# AguaClara Design Tool
# [reference: BasicClientInputs.xmcd]
# [reference: ExpertClientInputs.xmcd]
# [reference: BasicInputs3Sed1Bay.xmcd]
# [reference: ExpertInputs.xmcd]
# [reference: DesignAssumptions.xmcd]
# [reference: MathFunctions.xmcd]
# [reference: PipeDatabase.xmcd]
# [reference: MinorLossCoefficients.xmcd]
# [reference: FluidsFunctions.xmcd]
# [reference: Sedimentation Tank.xmcd]
# [reference: Floc Hopper - New Design.xmcd]
# [reference: FCM.xmcd]
# [reference: Flocculator 3.xmcd]
# [reference: RapidMixer.xmcd]
# [reference: EntranceTankDim.xmcd]
# [reference: Materials List.xmcd]
# [reference: AutoCADMasterProgram.xmcd]
# This file must have at least one variable displayed otherwise it doesn't recalculate and it claims that all variables are undefined.
H_SedFrameWall = 0.07 m
EN_DrillSeries = 1
EN_PipeSpec = 4
L_Sed = 4.24907 m
EN_FcmTube = 0
AC_SedTank = [
    "_-view o t"; "-layer m tank"; "c t 132,132,132"; "tank"; "  "; "_-view o t _zoom w 0.16,-0.16,0 -4.40907,1.08,1.53695 _box 0,0,0 -4.24907,0.92,1.53695 _box 0.15,-0.15,-0.15 -4.39907,1.07,1.53695 _subtract 0.15,-0.15,-0.15  0,0,0 "; "-layer s 0"; "  "; "-layer f tank"; "  "
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]
AC_FlocTank = [
    "-layer m floctank"; "c t 91,91,91"; "floctank"; "  "; "_-view o t _zoom w 0.16,1.98,0 -4.40907,4.55,1.72011 _box 0,2.14,0 -4.24907,4.39,1.72011 _box 0.15,1.99,-0.15 -4.39907,4.54,1.72011 _subtract 0.15,1.99,-0.15  0,2.14,0 "; "-layer s 0"; "  "; "-layer f floctank"; "  "; "-layer m floctankwall"
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]
HL_FlocChannels = [0.0915033; 0.0530995; 0.0208964; 0.0176574] m
# pipe11_origin | pipe14_origin | pipe6_1ength | pipe7_length | pipe8_length | pipe13_length | pipe14_length
pipe5_1ength
# pipe12_origin | pipe13_origin | pipe1_length
