# AguaClara Water Treatment Plants
# Automated Design
# Add variable descriptions next to every varible so it is easy to interpret what this all means.
# Design References
# MathCAD dimension calculations:
# [reference: BasicInputs.xmcd]
# Use BasicClientInputs and ExpertClientInputs when this is run by LabVIEW.
# Use BasicInputs and ExpertInputs to use the program in MathCAD
# Change the reference by
# - right clicking
# - select properties
# - reference tab
# - type in the correct file name
# [reference: ExpertInputs.xmcd]
# [reference: DesignAssumptions.xmcd]
# [reference: MathFunctions.xmcd]
# [reference: PipeDatabase.xmcd]
# [reference: MinorLossCoefficients.xmcd]
# [reference: FluidsFunctions.xmcd]
# [reference: Sedimentation Tank.xmcd]
# [reference: Flocculator.xmcd]
# [reference: LFOM.xmcd]
# [reference: EntranceTankDim.xmcd]
# [reference: LinearCdc_app37.xmcd]
# [reference: ChemStorageCylinders.xmcd]
# [reference: Materials List.xmcd]
# [reference: SRSF jcw57.xmcd]
# AutoCAD drawing programs:
# Translators:
# These are the codes that take MathCAD outputs and create AutoCAD scripts that are used to draw the plant (formerly Basics)
# [reference: MtoATranslators.xmcd]
# The wrapped MtoA translator contains the functions that the user will want to access. These functions will draw pieces with full functionality - specifying the location, dimension, and orientation of the object. Also, it contains layer control and subtraction capabilities for grouped objects.
# [reference: MtoATranslators Wrapped.xmcd]
# Plant Elements:
# These are all of the files that draw the fundamental parts of the plants (tees, elbows, tanks, pipes, etc)
# [reference: Channel.xmcd]
# [reference: cross.xmcd]
# [reference: Sludge.xmcd]
# [reference: Manifold.xmcd]
# [reference: pipe.xmcd]
# [reference: elbow.xmcd]
# [reference: tank.xmcd]
# [reference: lamina.xmcd]
# [reference: adapter.xmcd]
# [reference: Tee.xmcd]
# [reference: pvccap.xmcd]
# [reference: LaunderCap.xmcd]
# [reference: ChimneyStops.xmcd]
# [reference: laminaplain.xmcd]
# [reference: Stairs.xmcd]
# [reference: DrainChannel.xmcd]
# [reference: Manifold.xmcd]
# Specific Pieces:
# These are the codes that draw the bigger pieces of the plant (the sed tank, floc tank, etc)
# [reference: floctank.xmcd]
# [reference: SedTank- with pieces.xmcd]
# [reference: Entrance Tank.xmcd]
# [reference: ChemStockCylinders.xmcd]
# [reference: Plant Drain Channel.xmcd]
# [reference: Operator Access.xmcd]
# [reference: SRSF.xmcd]
# Layouts:
# This file will execute at the very end to create multiple views of the entire plant in paperspace
# [reference: Layouts.xmcd]
# Sed Tanks and Slopes:
N_SedTanks = 4
H_SedBetween = 0 cm  # Distance from the top of the inlet manifold to the bottom of the ledge supporting the lamella frame
L_Sed = 3.50731 m
N_SedBays = 1  # Number of bays of inlet manifolds in each sed tank
# Length of the port through which water exits the inlet manifold
outerradius(ND_FlocValve) = 0.0301625 m
# Width of ferrous cement plates in whice one manifold port is cut
Q_SedBay = 3 L/s
ND_FlocValve = 2 in
# Sedimentation Tank Sludge Drain:
N_SedSludgeOrifices = 35  # per cell
Ti_SludgeDrain = 30 min  # Tank Drain time
W_SedSludge = 9.63644 cm  # Width of the sludge channel
B_SedSludgeOrifices = 10 cm  # Distance center to center between drain orifices
H_SedSludge = 4.81822 cm  # Depth of the sludge channel
T_SedSludge = 5 cm
T_SedSludge = 5 cm
# Thickness of the plate topping the sludge channel
# through which drain holes are formed
W_SedDrainCover = 19.6364 cm
D_SedSludgeOrifice = 0.011 m  # Diameter of drain orifices
W_SedInletBottom = 0.441818 m
N_SedSludgeOrifices = 35
ND_SedSludgeValve = 2 in
# Sedimentation Tank Dimensions:
Z_SedSludge = 0.0981822 m  # Height from 0 of the top of the sludge drain
Z_SedSlopes = 0.820132 m  # Height from 0 of the top of the inlet manifold
W_Sed = 1.08 m  # Total tank wall height
L_Sed = 3.50731 m  # Total tank length
# Inlet Channel:
HW_InletChannel = 0.255898 m  # Width of the drop chimneys connecting channel to sed inlet manifolds
W_InletChannel = 0.405898 m  # length of drop chimmneys
L_Channel = 5.07 m
N_SedInletPipes = 2  # per sed bay
H_InletChannel = 0.355898 m
# Sedimentation Tank Effluent Launder:
N_SedLaunderOrifices = 44  # Number of orifices per launder
Q_SedLaunderOrifices = 7.12816e-5 m^3/s  # More Launder Dimensions
ND_SedLaunder = 4 in
B_SedLaunderOrifices = 0.102122 m  # Center to center launder spacing
L_SedLaunder = 2.39027 m
# Exit Channel:
D_SedLaunderOrifice = 0.511811 in
W_ExitChannel = 0.3532 m
H_ExitChannel = 0.355898 m
L_ExitChannel = 5.07 m
H_PltWeir = 0.265898 m  # height of the weir carrying water to the distribution tank
HW_ExitChannel = 0.215898 m  # water height in exit channel from 0
# Lamella:
L_SedPlate = 0.609667 m
B_SedPlate = 2.87774 cm  # center to center distance between lamella
S_SedPlate = 2.67774 cm  # spacing between lamella
N_SedPlates = 70  # Number of Sed Plates per Sedimentation Tank Bay.
AN_SedPlate = 60 deg
V_SedC = 10.2116 m/day
L_SedActive = 2.32605 m
T
V_SedUp = 68.4284 m/day
Z_SedLaunder = 1.54353 m
H_SedPlate = 0.527987 m
H_SedAbove = 0.166043 m  # Height of water needed above the lamella
N_SedPlates = 70
HW_Sed = 1.65242 m
H_Sed = 1.75242 m
Z_Mp = 1.39652 m
H_SedBayDivider = 0.820132 m
# Flocculator: | Look at Flocculator Positioning arrays
W_FlocChannel = 0.54 m
# Fill last channel with bafffles from last channel
# Fix port width to be based on energy dissipation in that channel
ED_Floc = 6 mW/kg
# Adjust spacing after the number of baffles per channel is known.
# Check the residence time of the flocculator should be at least 20minutes
HW_FlocEnd = 1.65242 m
X_FlocBaffles = [
    0.191466, 0.191466, 0.191466, 0.191466, 0.275898;
    0.364931, 0.364931, 0.364931, 0.364931, 0.454601;
    0.538397, 0.538397, 0.538397, 0.538397, 0.633304;
    0.711863, 0.711863, 0.711863, 0.711863, 0.812007;
    0.885329, 0.885329, 0.885329, 0.885329, 0.99071;
    1.05879, 1.05879, 1.05879, 1.05879, 1.16941;
    1.23226, 1.23226, 1.23226, 1.23226, 1.34812;
    1.40573, 1.40573, 1.40573, 1.40573, 1.52682;
    1.57919, 1.57919, 1.57919, 1.57919, 1.70552;
    1.75266, 1.75266, 1.75266, 1.75266, 1.88422;
    1.92612, 1.92612, 1.92612, 1.92612, 2.06293;
    2.09959, 2.09959, 2.09959, 2.09959, 2.24163;
    2.27305, 2.27305, 2.27305, 2.27305, 2.42033;
    2.44652, 2.44652, 2.44652, 2.44652, 2.59904;
    2.61999, 2.61999, 2.61999, 2.61999, 2.77774;
    2.79345, 2.79345, 2.79345, 2.79345, 2.95644;
    2.96692, 2.96692, 2.96692, 2.96692, 3.13515;
    3.14038, 3.14038, 3.14038, 3.14038, 3.31385;
    3.31385, 3.31385, 3.31385, 3.31385, 0
] m
L_FlocBaffles = [
    1.39522, 1.39522, 1.39522, 1.39522, 1.61289;
    1.61289, 1.61289, 1.61289, 1.61289, 1.39522;
    1.39522, 1.39522, 1.39522, 1.39522, 1.61289;
    1.61289, 1.61289, 1.61289, 1.61289, 1.39522;
    1.39522, 1.39522, 1.39522, 1.39522, 1.61289;
    1.61289, 1.61289, 1.61289, 1.61289, 1.39522;
    1.39522, 1.39522, 1.39522, 1.39522, 1.61289;
    1.61289, 1.61289, 1.61289, 1.61289, 1.39522;
    1.39522, 1.39522, 1.39522, 1.39522, 1.61289;
    1.61289, 1.61289, 1.61289, 1.61289, 1.39522;
    1.39522, 1.39522, 1.39522, 1.39522, 1.61289;
    1.61289, 1.61289, 1.61289, 1.61289, 1.39522;
    1.39522, 1.39522, 1.39522, 1.39522, 1.61289;
    1.61289, 1.61289, 1.61289, 1.61289, 1.39522;
    1.39522, 1.39522, 1.39522, 1.39522, 1.61289;
    1.61289, 1.61289, 1.61289, 1.61289, 1.39522;
    1.39522, 1.39522, 1.39522, 1.39522, 1.61289;
    1.61289, 1.61289, 1.61289, 1.61289, 1.39522;
    1.39522, 1.39522, 1.39522, 1.39522, 0
] m
Z_FlocBaffles = [
    0, 0, 0, 0, 0.265054;
    0.257199, 0.257199, 0.257199, 0.257199, 0;
    0, 0, 0, 0, 0.265054;
    0.257199, 0.257199, 0.257199, 0.257199, 0;
    0, 0, 0, 0, 0.265054;
    0.257199, 0.257199, 0.257199, 0.257199, 0;
    0, 0, 0, 0, 0.265054;
    0.257199, 0.257199, 0.257199, 0.257199, 0;
    0, 0, 0, 0, 0.265054;
    0.257199, 0.257199, 0.257199, 0.257199, 0;
    0, 0, 0, 0, 0.265054;
    0.257199, 0.257199, 0.257199, 0.257199, 0;
    0, 0, 0, 0, 0.265054;
    0.257199, 0.257199, 0.257199, 0.257199, 0;
    0, 0, 0, 0, 0.265054;
    0.257199, 0.257199, 0.257199, 0.257199, 0;
    0, 0, 0, 0, 0.265054;
    0.257199, 0.257199, 0.257199, 0.257199, 0;
    0, 0, 0, 0, 0
] m
N_FlocChannels = 5
L_FlocTank = 17.5366 m
HL_Floc = 16.7664 cm
HW_FlocStart = 1.82009 m
S_FlocBaffle = [17.1466; 17.1466; 17.1466; 17.1466; 17.6703] cm
B_FlocBaffle = [17.3466; 17.3466; 17.3466; 17.3466; 17.8703] cm
N_FlocChannelBaffles = [19; 19; 19; 19; 18]
W_FlocPort = [0.171466; 0.171466; 0.171466; 0.171466; 0.182701] m
HL_FlocChannels = [3.42554; 3.42554; 3.42554; 3.42554; 3.06422] cm
L_FlocBaffleLower = 1.39522 m
L_FlocBaffleUpper = 1.61289 m
H_FlocPort = [0.54; 0.54; 0.54; 0.54; 0.522273] m
Ti_Floc = 21.7334 min  # residence time of the flocculator
N_FlocBaffles = 94
# Materials List:
N_Launders = 4
L_LaunderPipeTotal = 9.56109 m
N_Valves = 4
N_LaunderCouplings = 4
N_ValveCouplings = 4
N_SedPlatesTotal = 280
N_SedPlatesPerSheet = 6
N_SedPlateSheets = 47
AC_SedTank =  # no stored result
AC_EntranceTank = [
    "-layer m Cdc"; "c t 129,0,129"; "Cdc"; "  "; "-insert CdcFloat.dwg"; "-3.61526,10.8265,1.8554 0.90553 0.90553 0"; "-insert CdcLeverArmBracket.dwg"; "-3.58166,10.42005,2.257 1 1 0"; "-insert CdcLeverArm.dwg"; "-3.61366,10.8328,2.2819 1 1 0"
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]
AC_FlocTank = [
    "-layer m FlocTank"; "c t 132,132,132"; "FlocTank"; "  "; "_-view o t _zoom w 0.16,4.76,0 -3.66731,8.38,1.92009 _box 0,4.92,0 -3.50731,8.22,1.92009 _box 0.15,4.77,-0.15 -3.65731,8.37,1.92009 _subtract 0.15,4.77,-0.15  0,4.92,0 "; "_box -3.65731,5.46,0 0.15,5.61,1.92009"; "-array l  R 4 1 0.69"; "-group c FlocTank y "; "all "; "-layer s 0"
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]
AC_ChemTanks = [
    "-layer m CoagTanks"; "c t 132,132,132"; "CoagTanks"; "  "; "_-view o t"; "_zoom w -4.82586,10.55215,1.4879 -4.18626,11.19175,2.5797"; "_cylinder -4.50606,10.87195,2.5697 0.3098 c -5.57786,10.87195,2.5697"; "rotate3d l  y -4.50606,10.87195,2.5697 90"; "-group c CoagTanks y "; "all "
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]
AC_OperatorAccess = [
    "-layer m AlumPlatform"; "c t 132,132,132"; "AlumPlatform"; "  "; "_-view o f"; "_pline"; "-6.04506,2.5747"; "-5.74506,2.5747"; "-5.74506,2.38008"; "-5.44506,2.38008"
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]
AC_DrainChannel = [
    "-layer m DrainChannel"; "c t 214,214,214"; "DrainChannel"; "  "; "3dpoly"; "0.3,-1.125,-0.2024"; "0.3,-1.125,-0.27507"; "0.3,-0.725,-0.49775"; "0.3,-0.325,-0.27507"; "0.3,-0.325,-0.2024"
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]
# [component: inputs stack(AC_EntranceTank, AC_ChemTanks)]
